OpenVSP model (file version 5), 4 components.
Geometry view with OpenVSP parameter names; values to 6 digits, angles in degrees, lengths in the model's unit.
Overall bounding box: X_Min=0 X_Len=10 Y_Min=-6.5 Y_Len=13 Z_Min=-0.5 Z_Len=3.03065

Pod "PodGeom"
  location (X Y Z) 0 0 0, rotation 0 0 0
  bounding box size 10 1 1
  Design: FineRatio=20 Length=10

Wing "WingGeom", child of "PodGeom"
  location (X Y Z) 2 0 0, rotation 0 0 0
  symmetric about XZ
  bounding box size 4.55278 13 0.320186
  totals: TotalSpan=13 TotalProjectedSpan=13 TotalChord=2 TotalArea=26 TotalAR=6.5
  root: chord 3.2, twist 0, NACA 4-series Camber=0 CamberLoc=0.1 ThickChord=0.1
  sections:
    n  Span  Root_Chord  Tip_Chord  Area  Sweep  Sweep_Location  Dihedral  Twist  Twist_Location  tip airfoil
    1  6.5   3.2         0.8        13    30     0               0         0      0.25            NACA 4-series Camber=0 CamberLoc=0.2 ThickChord=0.1

Wing "WingGeom", child of "PodGeom"
  location (X Y Z) 8 0 0, rotation 0 0 0
  symmetric about XZ
  bounding box size 1.76445 5.12579 0.113972
  totals: TotalSpan=5.12579 TotalProjectedSpan=5.12579 TotalChord=0.711915 TotalArea=3.64912 TotalAR=7.2
  root: chord 1.13906, twist 0, NACA 4-series Camber=0 CamberLoc=0.2 ThickChord=0.1
  sections:
    n  Span     Root_Chord  Tip_Chord  Area     Sweep  Sweep_Location  Dihedral  Twist  Twist_Location  tip airfoil
    1  2.56289  1.13906     0.284766   1.82456  30     0               0         0      0.25            as above

Wing "WingGeom", child of "PodGeom"
  location (X Y Z) 8.2 0 0, rotation 90 0 0
  bounding box size 1.74226 0.112539 2.53065
  totals: TotalSpan=2.53065 TotalProjectedSpan=2.53065 TotalChord=0.702959 TotalArea=1.77895 TotalAR=3.6
  root: chord 1.12474, twist 0, NACA 4-series Camber=0 CamberLoc=0.2 ThickChord=0.1
  sections:
    n  Span     Root_Chord  Tip_Chord  Area     Sweep  Sweep_Location  Dihedral  Twist  Twist_Location  tip airfoil
    1  2.53065  1.12474     0.281184   1.77895  30     0               0         0      0.25            as above
